clear

Set DefaultBaseFrequency=50  ! for European system

New circuit.LVTest
Edit Vsource.Source BasekV=11 pu=1.05  ISC3=3000  ISC1=5
Redirect LineCode.txt
Redirect LoadShapes.txt
batchedit loadshape..* useactual=no
Redirect Lines.txt
Redirect Transformers.txt
Redirect Loads.txt
Redirect Monitors.txt


New energymeter.m1 LINE.LINE1 1

Set voltagebases=[11  .416]
Calcvoltagebases

buscoords Buscoords.txt
solve
Export Monitor LINE33_VI_vs_Time
Export Monitor LINE46_VI_vs_Time
Export Monitor LINE69_VI_vs_Time
Export Monitor LINE72_VI_vs_Time
Export Monitor LINE73_VI_vs_Time
Export Monitor LINE82_VI_vs_Time
Export Monitor LINE177_VI_vs_Time
Export Monitor LINE207_VI_vs_Time
Export Monitor LINE224_VI_vs_Time
Export Monitor LINE247_VI_vs_Time
Export Monitor LINE248_VI_vs_Time
Export Monitor LINE263_VI_vs_Time
Export Monitor LINE275_VI_vs_Time
Export Monitor LINE288_VI_vs_Time
Export Monitor LINE313_VI_vs_Time
Export Monitor LINE319_VI_vs_Time
Export Monitor LINE326_VI_vs_Time
Export Monitor LINE336_VI_vs_Time
Export Monitor LINE341_VI_vs_Time
Export Monitor LINE348_VI_vs_Time
Export Monitor LINE386_VI_vs_Time
Export Monitor LINE387_VI_vs_Time
Export Monitor LINE405_VI_vs_Time
Export Monitor LINE457_VI_vs_Time
Export Monitor LINE501_VI_vs_Time
Export Monitor LINE521_VI_vs_Time
Export Monitor LINE538_VI_vs_Time
Export Monitor LINE555_VI_vs_Time
Export Monitor LINE561_VI_vs_Time
Export Monitor LINE562_VI_vs_Time
Export Monitor LINE610_VI_vs_Time
Export Monitor LINE613_VI_vs_Time
Export Monitor LINE618_VI_vs_Time
Export Monitor LINE628_VI_vs_Time
Export Monitor LINE638_VI_vs_Time
Export Monitor LINE675_VI_vs_Time
Export Monitor LINE681_VI_vs_Time
Export Monitor LINE687_VI_vs_Time
Export Monitor LINE700_VI_vs_Time
Export Monitor LINE701_VI_vs_Time
Export Monitor LINE754_VI_vs_Time
Export Monitor LINE777_VI_vs_Time
Export Monitor LINE779_VI_vs_Time
Export Monitor LINE784_VI_vs_Time
Export Monitor LINE812_VI_vs_Time
Export Monitor LINE816_VI_vs_Time
Export Monitor LINE834_VI_vs_Time
Export Monitor LINE859_VI_vs_Time
Export Monitor LINE860_VI_vs_Time
Export Monitor LINE885_VI_vs_Time
Export Monitor LINE895_VI_vs_Time
Export Monitor LINE897_VI_vs_Time
Export Monitor LINE898_VI_vs_Time
Export Monitor LINE899_VI_vs_Time
Export Monitor LINE905_VI_vs_Time


//=======================================
/*

set mode=yearly number= 1440 stepsize=1m    ! one day simulation

! Set "DemandInterval" to true so that energy quantities recorded by energy meters are recorded for
! each time step and set "casename" to define a directory under default directory in which all of the
! demand interval data is recorded.  (NOTE: Setting Demand=true resets all energymeters.)

Set overloadreport=true  ! TURN OVERLOAD REPORT ON
Set voltexcept=true      ! voltage exception report
set demand=true          ! demand interval ON
set DIVerbose=true       ! verbose mode is ON

Set Year=1        ! This statement resets all meters
solve
closedi     ! close demand interval files at end of run


*/

//=======================================
/*


Show mon LINE558_VI_vs_Time
Show mon LINE825_VI_vs_Time
plot circuit Power Max=30 dots=y labels=n subs=y C1=$00FF0000

plot profile ph=all


Plot monitor object= line558_vi_vs_time channels=(1 3 5 ) bases=[240 240 240]
Plot monitor object= line825_vi_vs_time channels=(1 3 5 ) bases=[240 240 240]
*/
